***RESTART,WRITE,FREQUENCY = 9999,overlay
*HEADING
By Dung-An Wang
Create: June 17th, 2025
Modified:
abaqus job=sb interactive
gawk -f oh.awk sb.dat > sb_fea.txt
*NODE, nset=nset_upper
1 , 0.000000e+00 , 2.014528e+01, 0
2 , 1.046637e+01 , 2.404522e+01, 0
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*NODE, nset=nset_lower
42 , 0.000000e+00 , -5.000000e+00, 0
43 , 2.688900e+00 , -3.767238e+00, 0
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*NSET, NSET=nset_anchor_upper
1,
*NSET, NSET=nset_end
41,82
*NSET, NSET=nset_monitor
41,
*NSET, NSET=nset_anchor_lower
42,
*NSET, NSET=nset_anchor
1,42
*NSET, NSET=nset_all
nset_upper,nset_lower
** --- Mesh the beam ---
*ELEMENT,TYPE=B21H,ELSET=elset_beamIN
1 , 1 , 2
2 , 2 , 3
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*ELEMENT,TYPE=B21H,ELSET=elset_beamOU
41 , 42 , 43
42 , 43 , 44
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*ELSET,ELSET=elset_beam
elset_beamOU,elset_beamIN
*MATERIAL,NAME = POM
*ELASTIC
3.500000e+03
*DENSITY
1.400000e-06
*BEAM SECTION,SECTION=RECT,ELSET=elset_beamIN,MATERIAL=POM
3.000000,0.800000
** dimension along the first beam section axis, dimension along the second beam section axis
0,0,-1
** First, second, third direction cosine of the first beam section axis
*BEAM SECTION,SECTION=RECT,ELSET=elset_beamOU,MATERIAL=POM
3.000000,0.800000
** dimension along the first beam section axis, dimension along the second beam section axis
0,0,-1
** First, second, third direction cosine of the first beam section axis
*STEP,INC=9999,NLGEOM,unsymm=yes
step 1
*STATIC
0.000100 , 1.0,1e-10 , 0.010000
*BOUNDARY,op=new
nset_anchor_upper,1,6,0
nset_anchor_lower,1,6,0
nset_end,1,1,0
nset_end,2,2,-1.000000e+01
nset_end,6,6,0
*monitor,  dof=2, node=nset_monitor, frequency=1
*NODE PRINT,NSET=nset_anchor,TOTALS=YES,FREQUENCY=1,summary=no
RF,
*NODE PRINT,NSET=nset_monitor,TOTALS=No,FREQUENCY=1,summary=no
U,RF,
*NODE PRINT,NSET=nset_upper,TOTALS=YES,FREQUENCY=1,summary=yes
coord,u
*EL PRINT,ELSET=elset_beam,FREQUENCY=1,totals=no,summary=yes
S11,S12,S13
** S12: Shear stress along the second cross-section axis
** S13: Shear stress along the first cross-section axis
*ENERGY PRINT,elset=elset_beam,FREQUENCY=1
*OUTPUT,field, frequency=1
*ELEMENT OUTPUT
S,E
*NODE output,nset=nset_all
U,RF
*END STEP
